// COMSOL Multiphysics 5.5.0.292 model "Numerical_tests.mph"
// Outline of the model tree

Parameters
  l = 20  // length of pipe
  muwater = 8.9E-4  // viscosity of water
  eta45 = 220 * exp(-1.3 * dmu) + 3.2 - 2.44 * exp(-0.06 * dmu ^ 0.645)  // parameter for visocisty fitting
  c45 = (0.8 + exp(-0.075 * dmu)) * (-1 + 1 / (1 + 1*10^11 * dmu ^ 12)) + 1 / (1 + 1*10^11 * dmu^ 12)  // parameter for visocisty fitting
  dmu = 1520  // diameter of pipe in microns
  H = 0.2  // RBC fraction
  alpha = 0.1  // growth coef
  gamma = 0.5  // strength of ss damping
  Beta = 210  // 0.4T
  kappa = 0.1  // extravasation rate
  R = 5.2424  // magnet distance to pipe
  T = 140  // Final time
  tau0 = 4  // stress threshold
  Pe = 10  // Peclet number
  delta = 0.1
  xi = 0.1
  cstar = 1.1
  kappa1 = 0.1
  d = 1

Functions
  an1: Analytic "Dimensionless Viscosity mu(H)/mu(0)" | funcname = mu; expr = (1 + (eta45- 1) * ((1 - H) ^ c45- 1) / ((1 - 0.45) ^ c45 - 1)); args = H
  an2: Analytic "C45" | funcname = C45; expr = (0.8 + exp(-0.075 * d)) * (-1 + 1 / (1 + 1*10^11 * d ^ 12)) + 1 / (1 + 1*10^11 * d ^ 12); args = H
  an4: Analytic "Beta" | funcname = Beta; expr = Vp * n * msat * Br / (6 * pi * radius* umax * d); args = H
  an5: Analytic | expr = tanh(x)
  gp1: GaussianPulse | location = -2; normalization = peak
  step1: Step | location = -0.1; from = 1; to = 0
  sw1: FunctionSwitch
  step2: Step | location = -5

Variables
  var1 "Variables 1"
    um = -x/(x^2+(y+R)^2)^2  // mag vel x dir
    vm = -(y+R)/(x^2+(y+R)^2)^2  // mag vel y dir

Couplings
  maxop1: Maximum on boundaries 2, 4-6

Geometry
  geom1 "Geometry 1" (2D, length unit mm)
    r1: Rectangle | pos = {-l, -1}; size = {2*l, 2}
    pt1: Point | p = {-4, -1}
    pt2: Point | p = {4, -1}
    pt3: Point | p = {, -1}
    fin: Finalize "Form Union"

Physics
  spf: LaminarFlow "Stokes Flow" on domains 1
    dependent variable u = {u, v, w}
    ShapeProperty.order_fluid = 2
    EquationForm.form = Stationary
    PhysicalModelProperty.StokesFlowProp = 1
    ConsistentStabilization.StreamlineDiffusion = 0
    ConsistentStabilization.CrosswindDiffusion = 0
    fp1: FluidProperties (default) | rho_mat = userdef; rho = 1; mu_mat = userdef; mu = 1
    init1: init "Initial Values 1" (default) | u_init = {(1-y^2), 0, 0}; p_init = -2*(x-l)
    wallbc1: WallBC "Wall 1" (default) | wallConstraints = weakConstraints
    bs3: BoundaryStress on boundaries 7 | BoundaryCondition = NormalStressNormalFlow
    bs5: BoundaryStress "Pressure Driven (Maintaining umax=1)" on boundaries 1
      BoundaryCondition = NormalStressNormalFlow
      Fbnd = {40, 0, 0}
      f0 = 4*l
    inl1: InletBoundary "Flux driven" (disabled) on boundaries 1 | BoundaryCondition = MassFlow; mfr = 4/(3)
  ale: MovingMesh on all domains
    EquationForm.form = Transient
    fix1: FixedMesh (default)
    disp1: PrescribedMeshDisplacement (default)
    free1: FreeDeformation on domains 1
    disp2: PrescribedMeshDisplacement on boundaries 3
    disp3: PrescribedMeshDisplacement on boundaries 1, 7 | useDx = {1, 0}
    vel7: PrescribedMeshVelocity "Exponential Extravasation" on boundaries 2, 4-6
      vx = {0, (alpha * (-xi * flc1hs(c-cstar-delta,delta)*(c-cstar)+gamma*mu(H)* ( spf.sr-tau0/mu(H))*flc2hs(spf.sr-tau0/mu(H)-delta,delta)*flc2hs(y+1-delta,delta)) + kappa * (y + 1 ))}
      coordinateSystem = sys1
    vel8: PrescribedMeshVelocity "Constant Extravasation (Enable if wanted)" (disabled) on boundaries 2, 4-6
      vx = {0, (alpha * (-xi * flc1hs(c-cstar-delta,delta)*(c-cstar)+gamma*mu(H)* ( spf.sr-tau0/mu(H))*flc2hs(spf.sr-tau0/mu(H)-delta,delta)*flc2hs(y+1-delta,delta)) + kappa1* flc2hs(y+1-delta,delta))}
      coordinateSystem = sys1
  tds: DilutedSpecies "Cell Transport (c)" on all domains
    dependent variable c
    ShapeProperty.order_concentration = 2
    MassConsistentStabilization.massStreamlineDiffusion = 0
    MassConsistentStabilization.massCrosswindDiffusion = 0
    MassConsistentStabilization.Residual = FullResidual
    AdvancedSettings.ConvectiveTerm = cons
    cdm1: ConvectionDiffusionMigration "Transport Properties 1" (default)
      u = {(um*Beta/mu(H)+u), (vm*Beta/mu(H)+v), 0}
      D_c = 1/Pe
    nflx1: NoFlux (default) | IncludeConvection = 1
    init1: init "Initial Values 1" (default)
    in1: Inflow on boundaries 1 | c0 = (tanh(t-3)-tanh(t-35))/2
    out1: Outflow on boundaries 7
    fl1: FluxBoundary "Flux 1" on boundaries 2, 4-6
      species = 1
      J0 = -xi * flc1hs(c-cstar-delta,delta)*(c-cstar)-c*(yt*ny+xt*nx)+gamma *mu(H)* ( spf.sr-tau0/mu(H))*flc2hs(spf.sr-tau0/mu(H)-delta,delta)*flc2hs(y+1-delta,delta)
      IncludeConvection = 1

Multiphysics
  rfd1: ReactingFlowDS "Reacting Flow, Diluted Species 1" (disabled) on domains 1
    Fluid_physics = spf
    Species_physics = tds
  fc1: FlowCoupling (disabled) | Source_physics = spf; Destination_physics = tds

Mesh
  mesh1 "Mesh"
    size: MeshSizeDefault | hauto = 4
    fq1: FreeQuad on remaining entities | xscale = 5; yscale = 5
      dis1: Distribution (disabled) on boundaries 4, 5 | numelem = 30*E
      cr1: CornerRefinement (disabled) on entire geometry | boundary = boundaries 2, 4-6
    ftri1: FreeTri "Free Triangular 1" on remaining entities
    bl1: BndLayer "Boundary Layers 1" (disabled) on entire geometry
      blp: BndLayerProp "Boundary Layer Properties" on boundaries 2, 4-6 | blnlayers = 5; blstretch = 1
    ref1: Refine (disabled) on entire geometry | boxcoord = on; xmax = 4.45; xmin = -4.15; ymax = -0.542; ymin = -1.39
  mesh3 "Mesh a"
    size: MeshSizeDefault | hauto = 1
    ftri1: FreeTri "Free Triangular 1" on remaining entities
    ref1: Refine on boundaries 2, 4-6 | numrefine = 2
  mesh6 "TestMesh" (physics-controlled)
    size: MeshSizeDefault | table = cfd; hauto = 9
  mesh7 "Mesh 1" (physics-controlled)
    size: MeshSizeDefault | table = cfd; hauto = 9
  mesh9 "Mesh 2" (physics-controlled)
    size: MeshSizeDefault | table = cfd; hauto = 9
  mesh4 "Mesh 3 (Chosen Mesh)" (physics-controlled)
    size: MeshSizeDefault | table = cfd; hauto = 9
  mesh5 "Mesh 4" (physics-controlled)
    size: MeshSizeDefault | table = cfd; hauto = 8
  mesh8 "Mesh 5" (physics-controlled)
    size: MeshSizeDefault | table = cfd; hauto = 7

Studies
  std22 "Mesh Conv: Mesh 1"
    param: Parametric "Parametric Sweep" (disabled)
      pname = {Beta, kappa, gamma}
      plistarr = {210, 0.1, 0.5}
      punit = {, , }
    time: Transient "Time Dependent" | tlist = range(0,5,100); usertol = on; rtol = 0.001; mesh = {geom1, mesh7}
  std27 "Mesh Conv: Mesh 2"
    time: Transient "Time Dependent" | tlist = range(0,5,100); usertol = on; rtol = 0.001; mesh = {geom1, mesh9}
  std24 "Mesh Conv: Mesh 3"
    time: Transient "Time Dependent" | tlist = range(0,5,100); usertol = on; rtol = 0.001; mesh = {geom1, mesh4}
  std25 "Mesh Conv: Mesh 4"
    time: Transient "Time Dependent" | tlist = range(0,5,100); usertol = on; rtol = 0.001; mesh = {geom1, mesh5}
  std28 "Mesh Conv: Mesh 5"
    time1: Transient "Time Dependent 1" | tlist = range(0,5,100)

Solver configurations
  sol456 "Solution 456" (study std22)
    v1: Variables "Dependent Variables 1"
      comp1_spatial_disp: Field "Spatial mesh displacement (comp1.spatial.disp)"
        scalemethod = manual
        scaleval = 0.415657791939
    t1: Time "Time-Dependent Solver 1"
      tlist = range(0,5,100)
      rtol = 0.001
      atolglobalfactor = 0.05
      atolmethod = {comp1_c, global, comp1_p, scaled, comp1_spatial_disp, global, comp1_u, global, comp1_u_lm, global}
      atolfactor = {comp1_c, 0.1, comp1_p, 1, comp1_spatial_disp, 0.1, comp1_u, 0.1, comp1_u_lm, 0.1}
      maxorder = 3
      stabcntrl = on
      bwinitstepfrac = 0.01
      estrat = exclude
      fc1: FullyCoupled
        linsolver = d1
        maxiter = 8
        ntolfact = 0.5
        damp = 0.9
        jtech = onevery
        stabacc = aacc
        aaccdim = 5
      d1: Direct
  sol457 "Parametric Solutions 4" (study std22)
  sol482 "Solution 482" (study std24)
    v1: Variables "Dependent Variables 1"
      comp1_spatial_disp: Field "Spatial mesh displacement (comp1.spatial.disp)"
        scalemethod = manual
        scaleval = 0.188571949133
    t1: Time "Time-Dependent Solver 1"
      tlist = range(0,5,100)
      rtol = 0.001
      atolglobalfactor = 0.05
      atolmethod = {comp1_c, global, comp1_p, scaled, comp1_spatial_disp, global, comp1_u, global, comp1_u_lm, global}
      atolfactor = {comp1_c, 0.1, comp1_p, 1, comp1_spatial_disp, 0.1, comp1_u, 0.1, comp1_u_lm, 0.1}
      maxorder = 3
      stabcntrl = on
      bwinitstepfrac = 0.01
      estrat = exclude
      fc1: FullyCoupled
        linsolver = d1
        maxiter = 8
        ntolfact = 0.5
        damp = 0.9
        jtech = onevery
        stabacc = aacc
        aaccdim = 5
      d1: Direct
  sol483 "Solution 483" (study std25)
    v1: Variables "Dependent Variables 1"
      comp1_spatial_disp: Field "Spatial mesh displacement (comp1.spatial.disp)"
        scalemethod = manual
        scaleval = 0.127084106009
    t1: Time "Time-Dependent Solver 1"
      tlist = range(0,5,100)
      rtol = 0.001
      atolglobalfactor = 0.05
      atolmethod = {comp1_c, global, comp1_p, scaled, comp1_spatial_disp, global, comp1_u, global, comp1_u_lm, global}
      atolfactor = {comp1_c, 0.1, comp1_p, 1, comp1_spatial_disp, 0.1, comp1_u, 0.1, comp1_u_lm, 0.1}
      maxorder = 3
      stabcntrl = on
      bwinitstepfrac = 0.01
      estrat = exclude
      fc1: FullyCoupled
        linsolver = d1
        maxiter = 8
        ntolfact = 0.5
        damp = 0.9
        jtech = onevery
        stabacc = aacc
        aaccdim = 5
      d1: Direct
  sol485 "Solution 485" (study std27)
    v1: Variables "Dependent Variables 1"
      comp1_spatial_disp: Field "Spatial mesh displacement (comp1.spatial.disp)"
        scalemethod = manual
        scaleval = 0.256013866812
    t1: Time "Time-Dependent Solver 1"
      tlist = range(0,5,100)
      rtol = 0.001
      atolglobalfactor = 0.05
      atolmethod = {comp1_c, global, comp1_p, scaled, comp1_spatial_disp, global, comp1_u, global, comp1_u_lm, global}
      atolfactor = {comp1_c, 0.1, comp1_p, 1, comp1_spatial_disp, 0.1, comp1_u, 0.1, comp1_u_lm, 0.1}
      maxorder = 3
      stabcntrl = on
      bwinitstepfrac = 0.01
      estrat = exclude
      fc1: FullyCoupled
        linsolver = d1
        maxiter = 8
        ntolfact = 0.5
        damp = 0.9
        jtech = onevery
        stabacc = aacc
        aaccdim = 5
      d1: Direct
  sol486 "Solution 486" (study std28)
    v1: Variables "Dependent Variables 1"
      comp1_spatial_disp: Field "Spatial mesh displacement (comp1.spatial.disp)"
        scalemethod = manual
        scaleval = 0.0869144406874
    t1: Time "Time-Dependent Solver 1"
      tlist = range(0,5,100)
      rtol = 0.001
      atolglobalfactor = 0.05
      atolmethod = {comp1_c, global, comp1_p, scaled, comp1_spatial_disp, global, comp1_u, global, comp1_u_lm, global}
      atolvaluemethod = {comp1_c, factor, comp1_p, factor, comp1_spatial_disp, factor, comp1_u, factor, comp1_u_lm, factor}
      atolfactor = {comp1_c, 0.1, comp1_p, 1, comp1_spatial_disp, 0.1, comp1_u, 0.1, comp1_u_lm, 0.1}
      maxorder = 2
      stabcntrl = on
      bwinitstepfrac = 0.01
      estrat = exclude
      rhoinf = 0.5
      predictor = constant
      fc1: FullyCoupled
        linsolver = d1
        maxiter = 8
        ntolfact = 0.5
        damp = 0.9
        jtech = onevery
        stabacc = aacc
        aaccdim = 5
      d1: Direct | pivotperturb = 1.0E-13

Datasets
  dset50: Solution | solution = sol456
  dset51: Solution | solution = sol457
  dset53: Solution | solution = sol482
  dset54: Solution | solution = sol483
  dset56: Solution | solution = sol485
  dset57: Solution | solution = sol486
  join1: Join | data = dset50; data2 = dset57
  join2: Join | data = dset56; data2 = dset57
  join3: Join | data = dset53; data2 = dset57
  join4: Join | data = dset54; data2 = dset57

Evaluation groups
  eg1: EvaluationGroup | data = none
    max1: MaxSurface "Surface Maximum 1" | data = join1; expr = {c, u, v, p}; dataseries = maximum
    max2: MaxSurface "Surface Maximum 2" | data = join2; expr = {c, u, v, p}; dataseries = maximum
    max3: MaxSurface "Surface Maximum 3" | data = join3; expr = {c, u, v, p}; dataseries = maximum
    max4: MaxSurface "Surface Maximum 4" | data = join4; expr = {c, u, v, p}; dataseries = maximum
    max5: MaxSurface "Surface Maximum 5" on domains 1 | data = dset57; expr = {c, u, v, p}; dataseries = maximum
  eg2: EvaluationGroup | data = dset50
    max1: MaxLine "Line Maximum 1" | data = join1; expr = y+1; dataseries = maximum
    max2: MaxLine "Line Maximum 2" | data = join2; expr = y+1; dataseries = maximum
    max3: MaxLine "Line Maximum 3" | data = join3; expr = y+1; dataseries = maximum
    max4: MaxLine "Line Maximum 4" | data = join4; expr = y+1; dataseries = maximum
    max5: MaxLine "Line Maximum 5" on boundaries 2, 4-6 | data = dset57; expr = y+1; dataseries = maximum

Plots
  pg85: PlotGroup1D "1D Plot Group 85" | data = dset56
    lngr3: LineGraph (disabled) on boundaries 2-6 | data = dset53; expr = yt
    ptgr1: PointGraph (disabled) | expr = (spf.sr-2)/100
    lngr4: LineGraph (disabled) | expr = yt
    ptgr2: PointGraph on points 3 | expr = yt
    lngr5: LineGraph (disabled)
      expr = gamma *mu(H)* ( spf.sr-tau0/mu(H))*flc2hs(spf.sr-tau0/mu(H)-delta,delta)*flc2hs(y+1-delta,delta)